// SBML level 3 version 1
import "file:LacI_Inverter.xml";
import "file:TetR_Inverter.xml";

model GeneticToggle()

  // Sub-modules:
  C1: LacI_Inverter();
  C2: TetR_Inverter();

  // Compartments:
  compartment Cell = 1; C1.compartment__Cell is Cell; C2.compartment__Cell is Cell;

  // Species:
  substanceOnly species LacI in Cell = 60; C1.input__LacI is LacI; C2.output__LacI is LacI;
  substanceOnly species TetR in Cell = 0; C1.output__TetR is TetR; C2.input__TetR is TetR;
  substanceOnly species GFP in Cell = 0; C1.output__GFP is GFP;
  substanceOnly species $IPTG in Cell = 0;
  substanceOnly species $aTc in Cell = 0;
  substanceOnly species IPTG_LacI in Cell = 0;
  substanceOnly species aTc_TetR in Cell = 0;

  // Parameters:
  kd = 0.0075; kd is "Degradation rate";
  kc_f = 0.05; kc_f is "Forward complex formation rate";
  kc_r = 1; kc_r is "Reverse complex formation rate";
  nc = 2; nc is "Stoichiometry of binding";

  // Reactions:
  Degradation_TetR: TetR => ; kd*TetR;
  Degradation_LacI: LacI => ; kd*LacI;
  Degradation_GFP: GFP => ; kd*GFP;
  Degradation_IPTG_LacI: IPTG_LacI => ; kd*IPTG_LacI;
  Degradation_aTc_TetR: aTc_TetR => ; kd*aTc_TetR;
  Complex_IPTG_LacI: $IPTG + LacI -> IPTG_LacI; kc_f*IPTG^nc_IPTG*LacI^nc_LacI - kc_r*IPTG_LacI;
    nc_IPTG = 1; nc_LacI = 1;
  Complex_aTc_TetR: $aTc + TetR -> aTc_TetR; kc_f*aTc^nc_aTc*TetR^nc_TetR - kc_r*aTc_TetR;
    nc_aTc = 1; nc_TetR = 1;

  // Events:
  IPTG_High: at (2000) after (true), t0=false, persistent=false, fromTrigger=false: IPTG = 60;
  IPTG_Low: at (4000) after (true), t0=false, persistent=false, fromTrigger=false: IPTG = 0;
  aTc_High: at (6000) after (true), t0=false, persistent=false, fromTrigger=false: aTc = 60;
  aTc_Low: at (8000) after (true), t0=false, persistent=false, fromTrigger=false: aTc = 0;
end
