// SBML level 3 version 1

model Sensor_3OC6(Cell, _3OC6, exsC)

  // Compartments:
  compartment Cell = 1;

  // Species:
  substanceOnly species _3OC6 in Cell = 0;
  substanceOnly species _3OC6_luxR in Cell = 0;
  substanceOnly species luxR in Cell = 0;
  substanceOnly species exsC in Cell = 0;
  substanceOnly species P0 in Cell = 2;
  substanceOnly species P0_mRNA in Cell = 0;
  substanceOnly species pLux in Cell = 2;
  substanceOnly species pLux_mRNA in Cell = 0;

  // Parameters:
  kc_f = 0.05; kc_f is "Forward complex formation rate";
  kc_r = 1; kc_r is "Reverse complex formation rate";
  nc = 2; nc is "Stoichiometry of binding";
  kr_f = 0.5; kr_f is "Forward repression binding rate";
  kr_r = 1; kr_r is "Reverse repression binding rate";
  ka_f = 0.0033; ka_f is "Forward activation binding rate";
  ka_r = 1; ka_r is "Reverse activation binding rate";
  ko_f = 0.033; ko_f is "Forward RNAP binding rate";
  ko_r = 1; ko_r is "Reverse RNAP binding rate";
  kao_f = 1; kao_f is "Forward activated RNAP binding rate";
  kao_r = 1; kao_r is "Reverse activated RNAP binding rate";
  nr = 30; nr is "Initial RNAP count";
  ko = 0.05; ko is "Open complex production rate";
  kb = 0.0001; kb is "Basal production rate";
  ng = 2; ng is "Initial promoter count";
  np = 10; np is "Stoichiometry of production";
  ka = 0.25; ka is "Activated production rate";

  // Reactions:
  Complex__3OC6_luxR: 2 _3OC6 + 2 luxR -> _3OC6_luxR; kc_f*_3OC6^nc*luxR^nc - kc_r*_3OC6_luxR;
  Production_P0: => 10 P0_mRNA + 10 luxR; P0*ko*(ko_f/ko_r)*nr/(1 + ko_f/ko_r*nr);  // modifiers: P0
  Production_pLux: => 10 pLux_mRNA + 10 exsC; pLux*(kb*(ko_f/ko_r)*nr + ka*(kao_f/kao_r)*nr*(ka_f/ka_r*_3OC6_luxR)^nc)/(1 + ko_f/ko_r*nr + kao_f/kao_r*nr*(ka_f/ka_r*_3OC6_luxR)^nc);  // modifiers: pLux, _3OC6_luxR
end
