// SBML level 3 version 1

model Sensor_Ara(Cell, Ara, ipgC)

  // Compartments:
  compartment Cell = 1;

  // Species:
  substanceOnly species P0 in Cell = 2;
  substanceOnly species P0_mRNA in Cell = 0;
  substanceOnly species pBAD in Cell = 2;
  substanceOnly species pBAD_mRNA in Cell = 0;
  substanceOnly species araC in Cell = 0;
  substanceOnly species Ara in Cell = 0;
  substanceOnly species Ara_araC in Cell = 0;
  substanceOnly species ipgC in Cell = 0;

  // Parameters:
  kr_f = 0.5; kr_f is "Forward repression binding rate";
  kr_r = 1; kr_r is "Reverse repression binding rate";
  ka_f = 0.0033; ka_f is "Forward activation binding rate";
  ka_r = 1; ka_r is "Reverse activation binding rate";
  ko_f = 0.033; ko_f is "Forward RNAP binding rate";
  ko_r = 1; ko_r is "Reverse RNAP binding rate";
  kao_f = 1; kao_f is "Forward activated RNAP binding rate";
  kao_r = 1; kao_r is "Reverse activated RNAP binding rate";
  nc = 2; nc is "Stoichiometry of binding";
  nr = 30; nr is "Initial RNAP count";
  ko = 0.05; ko is "Open complex production rate";
  kb = 0.0001; kb is "Basal production rate";
  ng = 2; ng is "Initial promoter count";
  np = 10; np is "Stoichiometry of production";
  ka = 0.25; ka is "Activated production rate";
  kc_f = 0.05; kc_f is "Forward complex formation rate";
  kc_r = 1; kc_r is "Reverse complex formation rate";

  // Reactions:
  Production_P0: => 10 P0_mRNA + 10 araC; P0*ko*(ko_f/ko_r)*nr/(1 + ko_f/ko_r*nr);  // modifiers: P0
  Production_pBAD: => 10 pBAD_mRNA + 10 ipgC; pBAD*(kb*(ko_f/ko_r)*nr + ka*(kao_f/kao_r)*nr*(ka_f/ka_r*Ara_araC)^nc)/(1 + ko_f/ko_r*nr + kao_f/kao_r*nr*(ka_f/ka_r*Ara_araC)^nc);  // modifiers: pBAD, Ara_araC
  Complex_Ara_araC: 2 Ara + 2 araC -> Ara_araC; kc_f*Ara^nc*araC^nc - kc_r*Ara_araC;
end
