// SBML level 3 version 1

model Sensor_aTc(Cell, aTc, exsDA)

  // Compartments:
  compartment Cell = 1;

  // Species:
  substanceOnly species aTc in Cell = 0;
  substanceOnly species aTc_tetR in Cell = 0;
  substanceOnly species tetR in Cell = 0;
  substanceOnly species exsDA in Cell = 0;
  substanceOnly species P0 in Cell = 2;
  substanceOnly species P0_mRNA in Cell = 0;
  substanceOnly species pTet in Cell = 2;
  substanceOnly species pTet_mRNA in Cell = 0;

  // Parameters:
  kc_f = 0.05; kc_f is "Forward complex formation rate";
  kc_r = 1; kc_r is "Reverse complex formation rate";
  nc = 2; nc is "Stoichiometry of binding";
  kr_f = 0.5; kr_f is "Forward repression binding rate";
  kr_r = 1; kr_r is "Reverse repression binding rate";
  ka_f = 0.0033; ka_f is "Forward activation binding rate";
  ka_r = 1; ka_r is "Reverse activation binding rate";
  ko_f = 0.033; ko_f is "Forward RNAP binding rate";
  ko_r = 1; ko_r is "Reverse RNAP binding rate";
  kao_f = 1; kao_f is "Forward activated RNAP binding rate";
  kao_r = 1; kao_r is "Reverse activated RNAP binding rate";
  nr = 30; nr is "Initial RNAP count";
  ko = 0.05; ko is "Open complex production rate";
  kb = 0.0001; kb is "Basal production rate";
  ng = 2; ng is "Initial promoter count";
  np = 10; np is "Stoichiometry of production";
  ka = 0.25; ka is "Activated production rate";

  // Reactions:
  Complex_aTc_tetR: 2 aTc + 2 tetR -> aTc_tetR; kc_f*aTc^nc*tetR^nc - kc_r*aTc_tetR;
  Production_P0: => 10 P0_mRNA + 10 tetR; P0*ko*(ko_f/ko_r)*nr/(1 + ko_f/ko_r*nr);  // modifiers: P0
  Production_pTet: => 10 pTet_mRNA + 10 exsDA; pTet*(kb*(ko_f/ko_r)*nr + ka*(kao_f/kao_r)*nr*(ka_f/ka_r*aTc_tetR)^nc)/(1 + ko_f/ko_r*nr + kao_f/kao_r*nr*(ka_f/ka_r*aTc_tetR)^nc);  // modifiers: pTet, aTc_tetR
end
