// SBML level 3 version 1

model CRISPR_Template(Cell, gRNA_generic, cas9_generic, cas9_gRNA_complex, target, target_gene)

  // Compartments:
  compartment Cell = 1;

  // Species:
  substanceOnly species gRNA_generic in Cell = 0;
  substanceOnly species cas9_generic in Cell = 0;
  substanceOnly species cas9_gRNA_complex in Cell = 0;
  substanceOnly species target in Cell = 0;
  substanceOnly species target_gene in Cell = 2;

  // Parameters:
  kr_f = 0.5; kr_f is "Forward repression binding rate";
  kr_r = 1; kr_r is "Reverse repression binding rate";
  ka_f = 0.0033; ka_f is "Forward activation binding rate";
  ka_r = 1; ka_r is "Reverse activation binding rate";
  ko_f = 0.033; ko_f is "Forward RNAP binding rate";
  ko_r = 1; ko_r is "Reverse RNAP binding rate";
  kao_f = 1; kao_f is "Forward activated RNAP binding rate";
  kao_r = 1; kao_r is "Reverse activated RNAP binding rate";
  nc = 2; nc is "Stoichiometry of binding";
  nr = 30; nr is "Initial RNAP count";
  ko = 0.05; ko is "Open complex production rate";
  kb = 0.0001; kb is "Basal production rate";
  ng = 2; ng is "Initial promoter count";
  np = 10; np is "Stoichiometry of production";
  ka = 0.25; ka is "Activated production rate";
  kc_f = 0.05; kc_f is "Forward complex formation rate";
  kc_r = 1; kc_r is "Reverse complex formation rate";

  // Reactions:
  cas9_complex_formation: 2 gRNA_generic + 2 cas9_generic -> cas9_gRNA_complex; kc_f*gRNA_generic^nc*cas9_generic^nc - kc_r*cas9_gRNA_complex;
  _target_production: => 10 target; target_gene*ko*(ko_f/ko_r)*nr/(1 + ko_f/ko_r*nr + (kr_f/kr_r*cas9_gRNA_complex)^nc);  // modifiers: target_gene, cas9_gRNA_complex
end
