// SBML level 3 version 1
import "CRISPR_Template.xml";

model CRPb_characterization_Circuit(Cell)

  // Sub-modules:
  CRISPR_Template: CRISPR_Template();

  // Compartments:
  compartment Cell = 1; CRISPR_Template.compartment__Cell is Cell;

  // Species:
  substanceOnly species EYFP_gene in Cell = 2; CRISPR_Template.output__target_gene is EYFP_gene;
  substanceOnly species cas9m_BFP in Cell = 0; CRISPR_Template.output__cas9_generic is cas9m_BFP;
  substanceOnly species cas9m_BFP_gRNA_b in Cell = 0; CRISPR_Template.output__cas9_gRNA_complex is cas9m_BFP_gRNA_b;
  substanceOnly species EYFP in Cell = 0; CRISPR_Template.output__target is EYFP;
  substanceOnly species gRNA_b in Cell = 0; CRISPR_Template.output__gRNA_generic is gRNA_b;
  substanceOnly species Gal4VP16_gene in Cell = 2;
  substanceOnly species Gal4VP16 in Cell = 0;
  substanceOnly species mKate_gene in Cell = 2;
  substanceOnly species mKate in Cell = 0;
  substanceOnly species cas9m_BFP_gene in Cell = 2;
  substanceOnly species gRNA_b_gene in Cell = 2;
  substanceOnly species EYFP_gene_mRNA in Cell = 0;

  // Parameters:
  kr_f = 0.5; kr_f is "Forward repression binding rate";
  kr_r = 1; kr_r is "Reverse repression binding rate";
  ka_f = 0.0033; ka_f is "Forward activation binding rate";
  ka_r = 1; ka_r is "Reverse activation binding rate";
  ko_f = 0.033; ko_f is "Forward RNAP binding rate";
  ko_r = 1; ko_r is "Reverse RNAP binding rate";
  kao_f = 1; kao_f is "Forward activated RNAP binding rate";
  kao_r = 1; kao_r is "Reverse activated RNAP binding rate";
  nc = 2; nc is "Stoichiometry of binding";
  nr = 30; nr is "Initial RNAP count";
  ko = 0.05; ko is "Open complex production rate";
  kb = 0.0001; kb is "Basal production rate";
  ng = 2; ng is "Initial promoter count";
  np = 10; np is "Stoichiometry of production";
  ka = 0.25; ka is "Activated production rate";
  kd = 0.0075; kd is "Degradation rate";

  // Reactions:
  gRNA_b_deg: gRNA_b => ; kd*gRNA_b;
  cas9m_BFP_gRNA_b_deg: cas9m_BFP_gRNA_b => ; kd*cas9m_BFP_gRNA_b;
  mKate_deg: mKate => ; kd*mKate;
  EYFP_deg: EYFP => ; kd*EYFP;
  cas9m_BFP_deg: cas9m_BFP => ; kd*cas9m_BFP;
  Gal4VP16_deg: Gal4VP16 => ; kd*Gal4VP16;
  EYFP_gene_Production: => 10 EYFP_gene_mRNA; EYFP_gene*(kb*(ko_f/ko_r)*nr + ka*(kao_f/kao_r)*nr*(ka_f/ka_r*Gal4VP16)^nc)/(1 + ko_f/ko_r*nr + kao_f/kao_r*nr*(ka_f/ka_r*Gal4VP16)^nc);  // modifiers: EYFP_gene, Gal4VP16
  _Gal4VP16_production: => 10 Gal4VP16; Gal4VP16_gene*ko*(ko_f/ko_r)*nr/(1 + ko_f/ko_r*nr);  // modifiers: Gal4VP16_gene
  _mKate_production: => 10 mKate; mKate_gene*ko*(ko_f/ko_r)*nr/(1 + ko_f/ko_r*nr);  // modifiers: mKate_gene
  _cas9m_BFP_production: => 10 cas9m_BFP; cas9m_BFP_gene*ko*(ko_f/ko_r)*nr/(1 + ko_f/ko_r*nr);  // modifiers: cas9m_BFP_gene
  _gRNA_b_production: => 10 gRNA_b; gRNA_b_gene*ko*(ko_f/ko_r)*nr/(1 + ko_f/ko_r*nr);  // modifiers: gRNA_b_gene
end
