// SBML level 3 version 1

model Divide()

  // Compartments:
  compartment Cell = 1;

  // Species:
  substanceOnly species S0 in Cell = 0;

  // Parameters:
  kd = 0.0075; kd is "Degradation rate";
  np = 10; np is "Stoichiometry of production";
  ko = 0.05; ko is "Open complex production rate";
  kmdiff_f = 1; kmdiff_f is "Forward membrane diffusion rate";
  kmdiff_r = 0.01; kmdiff_r is "Reverse membrane diffusion rate";
  kecd = 0.005; kecd is "Extracellular degradation rate";
  kecdiff = 1; kecdiff is "Extracellular diffusion rate";

  // Reactions:
  Constitutive_S0: => 10 S0; ko;

  // Events:
  event0: at (200) after (true), t0=false, persistent=false, fromTrigger=false: ;
  event1: at (100) after (S0 > 50), t0=false, persistent=false, fromTrigger=false: ;
end
