// SBML level 3 version 1

function total(x, y)
  x + 2*y;
end
total is "Find total molecules";

function uniform(a, b)
  (a + b)/2;
end
uniform is "Uniform distribution";

model lambda()
  // model units - substance: nanoMole, time: second, volume: microLitre, extent: nanoMole

  // Compartments:
  compartment Cell = 1;

  // Species:
  substanceOnly species CI in Cell = 0;
  substanceOnly species CI2 in Cell = 0;
  substanceOnly species PR in Cell = 2;
  substanceOnly species CII in Cell = 0;
  substanceOnly species PRE in Cell = 2;

  // Parameters:
  kd = 0.0075; kd is "Degradation rate";
  kc_f = 0.05; kc_f is "Forward complex formation rate";
  kc_r = 1; kc_r is "Reverse complex formation rate";
  nc = 2; nc is "Stoichiometry of binding";
  kr_f = 0.5; kr_f is "Forward repression binding rate";
  kr_r = 1; kr_r is "Reverse repression binding rate";
  ka_f = 0.0033; ka_f is "Forward activation binding rate";
  ka_r = 1; ka_r is "Reverse activation binding rate";
  ko_f = 0.033; ko_f is "Forward RNAP binding rate";
  ko_r = 1; ko_r is "Reverse RNAP binding rate";
  kao_f = 1; kao_f is "Forward activated RNAP binding rate";
  kao_r = 1; kao_r is "Reverse activated RNAP binding rate";
  nr = 30; nr is "Initial RNAP count";
  ko = 0.05; ko is "Open complex production rate";
  kb = 0.0001; kb is "Basal production rate";
  ng = 2; ng is "Initial promoter count";
  np = 10; np is "Stoichiometry of production";
  ka = 0.25; ka is "Activated production rate";
  CI_total has nanoMole;

  // Assignment rules:
  CI_total := total(CI, CI2);

  // Reactions:
  Degradation_CI: CI => ; kd*CI;
  Complex_CI2: 2 CI -> CI2; Complex_CI2_kc_f*CI^nc - Complex_CI2_kc_r*CI2;
    Complex_CI2_kc_f = 0.1; Complex_CI2_kc_r = 1;
  Degradation_CI2: CI2 => ; kd*CI2;
  Production_PR: => 10 CII; PR*Production_PR_ko*(Production_PR_ko_f/Production_PR_ko_r)*nr/(1 + Production_PR_ko_f/Production_PR_ko_r*nr + (kr_CI2_f/kr_CI2_r*CI2)^nc_CI2_r);  // modifiers: PR, CI2
    nc_CI2_r = 1; kr_CI2_f = 0.2165; kr_CI2_r = 1; Production_PR_ko = 0.014; Production_PR_ko_f = 0.69422; Production_PR_ko_r = 1;
  Degradation_CII: CII => ; kd*CII;
  Production_PRE: => 10 CI; PRE*(Production_PRE_kb*(Production_PRE_ko_f/Production_PRE_ko_r)*nr + Production_PRE_ka*(kao_f/kao_r)*nr*(ka_CII_f/ka_CII_r*CII)^nc_CII_a)/(1 + Production_PRE_ko_f/Production_PRE_ko_r*nr + kao_f/kao_r*nr*(ka_CII_f/ka_CII_r*CII)^nc_CII_a);  // modifiers: PRE, CII
    Production_PRE_kb = 4e-5; Production_PRE_ka = 0.015; Production_PRE_ko_f = 0.01; Production_PRE_ko_r = 1; nc_CII_a = 1; ka_CII_f = 0.00161; ka_CII_r = 1;

  // Events:
  CellDivision: at (2100) after (true), t0=false, persistent=false, fromTrigger=false: CI = CI/uniform(1, 2), CI2 = CI2/uniform(1, 2), CII = CII/uniform(1, 2);

  // Constraints:
  constraint CI <= 20;
  constraint CII <= 50;

  // Unit definitions:
  unit nanoMole = 1e-9 mole;
  unit microLitre = 1e-3 litre;
end
