// SBML level 3 version 1

function total(x, y)
  x + 2*y;
end
total is "Find total molecules";

function uniform(a, b)
  (a + b)/2;
end
uniform is "Uniform distribution";

model lambda()
  // Created by iBioSim flatten routine
  // model units - substance: mole, time: second, volume: litre, extent: nanoMole

  // Compartments:
  compartment Cell = 1;

  // Species:
  substanceOnly species CI in Cell = 0;
  substanceOnly species CI2 in Cell = 0;
  substanceOnly species PR in Cell = 2;
  substanceOnly species CII in Cell = 0;
  substanceOnly species PRE in Cell = 2;
  substanceOnly species PRE_RNAP in Cell = 0;
  substanceOnly species PRE_CII_RNAP in Cell = 0;
  substanceOnly species PR_RNAP in Cell = 0;
  substanceOnly species PR_CI2_bound in Cell = 0;
  substanceOnly species RNAP in Cell = 30;
  substanceOnly species Cell__RNAP in Cell = 30;

  // Parameters:
  kd = 0.0075; kd is "Degradation rate";
  kc_f = 0.05; kc_f is "Forward complex formation rate";
  kc_r = 1; kc_r is "Reverse complex formation rate";
  nc = 2; nc is "Stoichiometry of binding";
  kr_f = 0.5; kr_f is "Forward repression binding rate";
  kr_r = 1; kr_r is "Reverse repression binding rate";
  ka_f = 0.0033; ka_f is "Forward activation binding rate";
  ka_r = 1; ka_r is "Reverse activation binding rate";
  ko_f = 0.033; ko_f is "Forward RNAP binding rate";
  ko_r = 1; ko_r is "Reverse RNAP binding rate";
  kao_f = 1; kao_f is "Forward activated RNAP binding rate";
  kao_r = 1; kao_r is "Reverse activated RNAP binding rate";
  nr = 30; nr is "Initial RNAP count";
  ko = 0.05; ko is "Open complex production rate";
  kb = 0.0001; kb is "Basal production rate";
  ng = 2; ng is "Initial promoter count";
  np = 10; np is "Stoichiometry of production";
  ka = 0.25; ka is "Activated production rate";
  CI_total = 0 nanoMole;

  // Reactions:
  Degradation_CI: CI => ; Degradation_CI_kd*CI;
    Degradation_CI_kd = 0.0075 u_1_second_n1;
  Degradation_CII: CII => ; Degradation_CII_kd*CII;
    Degradation_CII_kd = 0.0075 u_1_second_n1;
  Degradation_CI2: CI2 => ; Degradation_CI2_kd*CI2;
    Degradation_CI2_kd = 0.0075 u_1_second_n1;
  R_basal_production_PRE: => 10 CI; R_basal_production_PRE_kb*PRE_RNAP;  // modifiers: PRE_RNAP
    R_basal_production_PRE_kb = 4e-5 u_1_second_n1;
  R_act_production_PRE_CII: => 10 CI; R_act_production_PRE_CII_ka*PRE_CII_RNAP;  // modifiers: PRE_CII_RNAP
    R_act_production_PRE_CII_ka = 0.015 u_1_second_n1;
  R_constitutive_production_PR: => 10 CII; R_constitutive_production_PR_ko*PR_RNAP;  // modifiers: PR_RNAP
    R_constitutive_production_PR_ko = 0.014 u_1_second_n1;
  R_PRE_RNAP: RNAP + PRE -> PRE_RNAP; R_PRE_RNAP_ko_f*RNAP*PRE - R_PRE_RNAP_ko_r*PRE_RNAP;
    R_PRE_RNAP_ko_f = 0.01 u_1_mole_n1_1_second_n1; R_PRE_RNAP_ko_r = 1 u_1_second_n1;
  R_RNAP_binding_PRE_CII: RNAP + PRE + CII -> PRE_CII_RNAP; R_RNAP_binding_PRE_CII_kao_f*(Ka*CII)^R_RNAP_binding_PRE_CII_nc*RNAP*PRE - R_RNAP_binding_PRE_CII_kao_r*PRE_CII_RNAP;
    R_RNAP_binding_PRE_CII_kao_f = 1 u_1_mole_n1_1_second_n1; R_RNAP_binding_PRE_CII_kao_r = 1 u_1_second_n1; Ka = 0.00161 u_1_mole_n1; R_RNAP_binding_PRE_CII_nc = 1 dimensionless;
  R_PR_RNAP: RNAP + PR -> PR_RNAP; R_PR_RNAP_ko_f*RNAP*PR - R_PR_RNAP_ko_r*PR_RNAP;
    R_PR_RNAP_ko_f = 0.69422 u_1_mole_n1_1_second_n1; R_PR_RNAP_ko_r = 1 u_1_second_n1;
  R_repression_binding_PR_CI2: PR + CI2 -> PR_CI2_bound; R_repression_binding_PR_CI2_kr_f*CI2^R_repression_binding_PR_CI2_nc*PR - R_repression_binding_PR_CI2_kr_r*PR_CI2_bound;
    R_repression_binding_PR_CI2_kr_f = 0.2165 u_1_mole_n1_1_second_n1; R_repression_binding_PR_CI2_kr_r = 1 u_1_second_n1; R_repression_binding_PR_CI2_nc = 1 dimensionless;
  Complex_formation_CI2: 2 CI -> CI2; kf_c*CI^nc__CI_CI2 - kr_c*CI2;
    nc__CI_CI2 = 2 dimensionless; kf_c = 0.1 u_1_mole_n1_1_second_n1; kr_c = 1 u_1_second_n1;

  // Constraints:
  constraint CI <= 20;
  constraint CII <= 50;

  // Unit definitions:
  unit nanoMole = 1e-9 mole;
  unit microLitre = 1e-3 litre;
  unit u_1_second_n1 = 1 / second;
  unit u_1_mole_n1_1_second_n1 = 1 / (mole * second);
  unit u_1_mole_n1 = 1 / mole;
end
