// SBML level 3 version 1

function total(x, y)
  x + 2*y;
end
total is "Find total molecules";

function uniform(a, b)
  (a + b)/2;
end
uniform is "Uniform distribution";

function U(t, x, y)
  G(t, x) && F(t, y);
end
U is "Until Property";

model lambda()
  // Created by iBioSim flatten routine
  // model units - substance: mole, time: second, volume: litre, extent: nanoMole

  // Compartments:
  compartment Cell = 1;

  // Species:
  substanceOnly species CI in Cell = 0;
  substanceOnly species PR in Cell = 2;
  substanceOnly species CII in Cell = 0;
  substanceOnly species PRE in Cell = 2;

  // Parameters:
  kd = 0.0075; kd is "Degradation rate";
  kc_f = 0.05; kc_f is "Forward complex formation rate";
  kc_r = 1; kc_r is "Reverse complex formation rate";
  nc = 2; nc is "Stoichiometry of binding";
  kr_f = 0.5; kr_f is "Forward repression binding rate";
  kr_r = 1; kr_r is "Reverse repression binding rate";
  ka_f = 0.0033; ka_f is "Forward activation binding rate";
  ka_r = 1; ka_r is "Reverse activation binding rate";
  ko_f = 0.033; ko_f is "Forward RNAP binding rate";
  ko_r = 1; ko_r is "Reverse RNAP binding rate";
  kao_f = 1; kao_f is "Forward activated RNAP binding rate";
  kao_r = 1; kao_r is "Reverse activated RNAP binding rate";
  nr = 30; nr is "Initial RNAP count";
  ko = 0.05; ko is "Open complex production rate";
  kb = 0.0001; kb is "Basal production rate";
  ng = 2; ng is "Initial promoter count";
  np = 10; np is "Stoichiometry of production";
  ka = 0.25; ka is "Activated production rate";
  CI_total = 0 nanoMole;

  // Reactions:
  Degradation_CI: CI => ; Degradation_CI_kd*CI;
    Degradation_CI_kd = 0.0075 u_1_second_n1;
  Degradation_CII: CII => ; Degradation_CII_kd*CII;
    Degradation_CII_kd = 0.0075 u_1_second_n1;
  R_abstracted_production_PRE: => 10 CI; ng__PRE*(kb__PRE*Ko__PRE*R_abstracted_production_PRE_RNAP + ka__CII_PRE*R_abstracted_production_PRE_RNAP*(Ka__CII_PRE*CII)^nc__CII_PRE)/(1 + Ko__PRE*R_abstracted_production_PRE_RNAP + Kao__PRE*R_abstracted_production_PRE_RNAP*(Ka__CII_PRE*CII)^nc__CII_PRE);  // modifiers: CII
    R_abstracted_production_PRE_RNAP = 30 u_1_mole_n1; ng__PRE = 2 u_1_mole_n1; kb__PRE = 4e-5 u_1_second_n1; Ko__PRE = 0.01 u_1_mole_n1; Kao__PRE = 1 u_1_mole_n1; nc__CII_PRE = 1 dimensionless; Ka__CII_PRE = 0.00161 u_1_mole_n1; ka__CII_PRE = 0.015 u_1_second_n1;
  R_abstracted_production_PR: => 10 CII; ko__PR*ng__PR*Ko__PR*R_abstracted_production_PR_RNAP/(1 + Ko__PR*R_abstracted_production_PR_RNAP + (Kr__CI2_PR*(kf_c__CI2/(kr_c__CI2 + kd__CI2))^(nc__CI_CI2 - 1)*CI^nc__CI_CI2)^nc__CI2_PR);  // modifiers: CI
    R_abstracted_production_PR_RNAP = 30 u_1_mole_n1; ng__PR = 2 u_1_mole_n1; Ko__PR = 0.69422 u_1_mole_n1; ko__PR = 0.014 u_1_second_n1; kf_c__CI2 = 0.1 u_1_mole_n1_1_second_n1; kd__CI2 = 0.0075 u_1_second_n1; kr_c__CI2 = 1 u_1_second_n1; nc__CI_CI2 = 2 dimensionless; nc__CI2_PR = 1 dimensionless; Kr__CI2_PR = 0.2165 u_1_mole_n1;

  // Constraints:
  constraint U(time < 2100, CII <= 50, CI >= 50);

  // Unit definitions:
  unit nanoMole = 1e-9 mole;
  unit microLitre = 1e-3 litre;
  unit u_1_second_n1 = 1 / second;
  unit u_1_mole_n1 = 1 / mole;
  unit u_1_mole_n1_1_second_n1 = 1 / (mole * second);
end
