// SBML level 3 version 1

model GeneticToggle()
  // Created by libsbml flatten routine

  // Compartments:
  compartment Cell = 1;

  // Species:
  substanceOnly species GFP in Cell = 0;
  substanceOnly species LacI in Cell = 60;
  substanceOnly species TetR in Cell = 0;
  substanceOnly species $IPTG in Cell = 0;
  substanceOnly species $aTc in Cell = 0;
  substanceOnly species IPTG_LacI in Cell = 0;
  substanceOnly species aTc_TetR in Cell = 0;
  substanceOnly species C1__pLac in Cell = 2;
  substanceOnly species C2__P0 in Cell = 2;

  // Parameters:
  kd = 0.0075; kd is "Degradation rate";
  kc_f = 0.05; kc_f is "Forward complex formation rate";
  kc_r = 1; kc_r is "Reverse complex formation rate";
  nc = 2; nc is "Stoichiometry of binding";
  kmdiff_f = 1; kmdiff_f is "Forward membrane diffusion rate";
  kmdiff_r = 0.01; kmdiff_r is "Reverse membrane diffusion rate";
  kecd = 0.005; kecd is "Extracellular degradation rate";
  kecdiff = 1; kecdiff is "Extracellular diffusion rate";
  C1__kr_f = 0.5; C1__kr_f is "Forward repression binding rate";
  C1__kr_r = 1; C1__kr_r is "Reverse repression binding rate";
  C1__ka_f = 0.0033; C1__ka_f is "Forward activation binding rate";
  C1__ka_r = 1; C1__ka_r is "Reverse activation binding rate";
  C1__ko_f = 0.033; C1__ko_f is "Forward RNAP binding rate";
  C1__ko_r = 1; C1__ko_r is "Reverse RNAP binding rate";
  C1__kao_f = 1; C1__kao_f is "Forward activated RNAP binding rate";
  C1__kao_r = 1; C1__kao_r is "Reverse activated RNAP binding rate";
  C1__nc = 2; C1__nc is "Stoichiometry of binding";
  C1__nr = 30; C1__nr is "Initial RNAP count";
  C1__ko = 0.05; C1__ko is "Open complex production rate";
  C1__kb = 0.0001; C1__kb is "Basal production rate";
  C1__ng = 2; C1__ng is "Initial promoter count";
  C1__np = 10; C1__np is "Stoichiometry of production";
  C1__ka = 0.25; C1__ka is "Activated production rate";
  C2__kr_f = 0.5; C2__kr_f is "Forward repression binding rate";
  C2__kr_r = 1; C2__kr_r is "Reverse repression binding rate";
  C2__ka_f = 0.0033; C2__ka_f is "Forward activation binding rate";
  C2__ka_r = 1; C2__ka_r is "Reverse activation binding rate";
  C2__ko_f = 0.033; C2__ko_f is "Forward RNAP binding rate";
  C2__ko_r = 1; C2__ko_r is "Reverse RNAP binding rate";
  C2__kao_f = 1; C2__kao_f is "Forward activated RNAP binding rate";
  C2__kao_r = 1; C2__kao_r is "Reverse activated RNAP binding rate";
  C2__nc = 2; C2__nc is "Stoichiometry of binding";
  C2__nr = 30; C2__nr is "Initial RNAP count";
  C2__ko = 0.05; C2__ko is "Open complex production rate";
  C2__kb = 0.0001; C2__kb is "Basal production rate";
  C2__ng = 2; C2__ng is "Initial promoter count";
  C2__np = 10; C2__np is "Stoichiometry of production";
  C2__ka = 0.25; C2__ka is "Activated production rate";

  // Reactions:
  Degradation_GFP: GFP => ; kd*GFP;
  Degradation_TetR: TetR => ; kd*TetR;
  Degradation_IPTG_LacI: IPTG_LacI => ; kd*IPTG_LacI;
  Degradation_aTc_TetR: aTc_TetR => ; kd*aTc_TetR;
  Complex_IPTG_LacI: $IPTG + LacI -> IPTG_LacI; kc_f*IPTG^nc_IPTG*LacI^nc_LacI - kc_r*IPTG_LacI;
    nc_LacI = 1; nc_IPTG = 1;
  Complex_aTc_TetR: TetR + $aTc -> aTc_TetR; kc_f*TetR^nc_TetR*aTc^nc_aTc - kc_r*aTc_TetR;
    nc_aTc = 1; nc_TetR = 1;
  Degradation_LacI: LacI => ; kd*LacI;
  C1__Production_pLac: => 10 TetR + 10 GFP; C1__pLac*C1__ko*(C1__ko_f/C1__ko_r)*C1__nr/(1 + C1__ko_f/C1__ko_r*C1__nr + (C1__kr_f/C1__kr_r*LacI)^C1__nc);  // modifiers: C1__pLac, LacI
  C2__Production_P0: => 10 LacI; C2__P0*C2__ko*(C2__ko_f/C2__ko_r)*C2__nr/(1 + C2__ko_f/C2__ko_r*C2__nr + (C2__kr_f/C2__kr_r*TetR)^C2__nc);  // modifiers: C2__P0, TetR

  // Events:
  IPTG_High: at (2000) after (true), t0=false, persistent=false, fromTrigger=false: IPTG = 60;
  IPTG_Low: at (4000) after (true), t0=false, persistent=false, fromTrigger=false: IPTG = 0;
  aTc_High: at (6000) after (true), t0=false, persistent=false, fromTrigger=false: aTc = 60;
  aTc_Low: at (8000) after (true), t0=false, persistent=false, fromTrigger=false: aTc = 0;
end
