// SBML level 3 version 1

model GeneticToggle()
  // Created by iBioSim flatten routine
  // model units - substance: mole, volume: litre

  // Compartments:
  compartment Cell = 1;

  // Species:
  substanceOnly species GFP in Cell = 0;
  substanceOnly species LacI in Cell = 60;
  substanceOnly species TetR in Cell = 0;
  substanceOnly species $IPTG in Cell = 0;
  substanceOnly species $aTc in Cell = 0;
  substanceOnly species C1__pLac in Cell = 2;
  substanceOnly species C2__P0 in Cell = 2;

  // Parameters:
  kd = 0.0075; kd is "Degradation rate";
  kc_f = 0.05; kc_f is "Forward complex formation rate";
  kc_r = 1; kc_r is "Reverse complex formation rate";
  nc = 2; nc is "Stoichiometry of binding";
  C1__kr_f = 0.5; C1__kr_f is "Forward repression binding rate";
  C1__kr_r = 1; C1__kr_r is "Reverse repression binding rate";
  C1__ka_f = 0.0033; C1__ka_f is "Forward activation binding rate";
  C1__ka_r = 1; C1__ka_r is "Reverse activation binding rate";
  C1__ko_f = 0.033; C1__ko_f is "Forward RNAP binding rate";
  C1__ko_r = 1; C1__ko_r is "Reverse RNAP binding rate";
  C1__kao_f = 1; C1__kao_f is "Forward activated RNAP binding rate";
  C1__kao_r = 1; C1__kao_r is "Reverse activated RNAP binding rate";
  C1__nc = 2; C1__nc is "Stoichiometry of binding";
  C1__nr = 30; C1__nr is "Initial RNAP count";
  C1__ko = 0.05; C1__ko is "Open complex production rate";
  C1__kb = 0.0001; C1__kb is "Basal production rate";
  C1__ng = 2; C1__ng is "Initial promoter count";
  C1__np = 10; C1__np is "Stoichiometry of production";
  C1__ka = 0.25; C1__ka is "Activated production rate";
  C2__kr_f = 0.5; C2__kr_f is "Forward repression binding rate";
  C2__kr_r = 1; C2__kr_r is "Reverse repression binding rate";
  C2__ka_f = 0.0033; C2__ka_f is "Forward activation binding rate";
  C2__ka_r = 1; C2__ka_r is "Reverse activation binding rate";
  C2__ko_f = 0.033; C2__ko_f is "Forward RNAP binding rate";
  C2__ko_r = 1; C2__ko_r is "Reverse RNAP binding rate";
  C2__kao_f = 1; C2__kao_f is "Forward activated RNAP binding rate";
  C2__kao_r = 1; C2__kao_r is "Reverse activated RNAP binding rate";
  C2__nc = 2; C2__nc is "Stoichiometry of binding";
  C2__nr = 30; C2__nr is "Initial RNAP count";
  C2__ko = 0.05; C2__ko is "Open complex production rate";
  C2__kb = 0.0001; C2__kb is "Basal production rate";
  C2__ng = 2; C2__ng is "Initial promoter count";
  C2__np = 10; C2__np is "Stoichiometry of production";
  C2__ka = 0.25; C2__ka is "Activated production rate";

  // Reactions:
  Degradation_GFP: GFP => ; Degradation_GFP_kd*GFP;
    Degradation_GFP_kd = 0.0075 u_1_second_n1;
  Degradation_LacI: LacI => ; Degradation_LacI_kd*LacI;
    Degradation_LacI_kd = 0.0075 u_1_second_n1;
  Degradation_TetR: TetR => ; Degradation_TetR_kd*TetR;
    Degradation_TetR_kd = 0.0075 u_1_second_n1;
  R_abstracted_production_C1__pLac: => 10 GFP + 10 TetR; ko__C1__pLac*ng__C1__pLac*Ko__C1__pLac*R_abstracted_production_C1__pLac_RNAP/(1 + Ko__C1__pLac*R_abstracted_production_C1__pLac_RNAP + (Kr__LacI_C1__pLac*LacI/(1 + (kf_c__IPTG_LacI/(kr_c__IPTG_LacI + kd__IPTG_LacI))^(nc__IPTG_IPTG_LacI + nc__LacI_IPTG_LacI - 1)*IPTG^nc__IPTG_IPTG_LacI))^nc__LacI_C1__pLac);  // modifiers: LacI, IPTG
    R_abstracted_production_C1__pLac_RNAP = 30 u_1_mole_n1; ng__C1__pLac = 2 u_1_mole_n1; Ko__C1__pLac = 0.033 u_1_mole_n1; ko__C1__pLac = 0.05 u_1_second_n1; kf_c__IPTG_LacI = 0.05 u_1_mole_n1_1_second_n1; kd__IPTG_LacI = 0.0075 u_1_second_n1; kr_c__IPTG_LacI = 1 u_1_second_n1; nc__IPTG_IPTG_LacI = 1 dimensionless; nc__LacI_IPTG_LacI = 1 dimensionless; nc__LacI_C1__pLac = 2 dimensionless; Kr__LacI_C1__pLac = 0.5 u_1_mole_n1;
  R_abstracted_production_C2__P0: => 10 LacI; ko__C2__P0*ng__C2__P0*Ko__C2__P0*R_abstracted_production_C2__P0_RNAP/(1 + Ko__C2__P0*R_abstracted_production_C2__P0_RNAP + (Kr__TetR_C2__P0*TetR/(1 + (kf_c__aTc_TetR/(kr_c__aTc_TetR + kd__aTc_TetR))^(nc__TetR_aTc_TetR + nc__aTc_aTc_TetR - 1)*aTc^nc__aTc_aTc_TetR))^nc__TetR_C2__P0);  // modifiers: TetR, aTc
    R_abstracted_production_C2__P0_RNAP = 30 u_1_mole_n1; ng__C2__P0 = 2 u_1_mole_n1; Ko__C2__P0 = 0.033 u_1_mole_n1; ko__C2__P0 = 0.05 u_1_second_n1; kf_c__aTc_TetR = 0.05 u_1_mole_n1_1_second_n1; kd__aTc_TetR = 0.0075 u_1_second_n1; kr_c__aTc_TetR = 1 u_1_second_n1; nc__TetR_aTc_TetR = 1 dimensionless; nc__aTc_aTc_TetR = 1 dimensionless; nc__TetR_C2__P0 = 2 dimensionless; Kr__TetR_C2__P0 = 0.5 u_1_mole_n1;

  // Events:
  IPTG_High: at (2000) after (true), t0=false, persistent=false, fromTrigger=false: IPTG = 60;
  IPTG_Low: at (4000) after (true), t0=false, persistent=false, fromTrigger=false: IPTG = 0;
  aTc_High: at (6000) after (true), t0=false, persistent=false, fromTrigger=false: aTc = 60;
  aTc_Low: at (8000) after (true), t0=false, persistent=false, fromTrigger=false: aTc = 0;

  // Unit definitions:
  unit u_1_second_n1 = 1 / second;
  unit u_1_mole_n1 = 1 / mole;
  unit u_1_mole_n1_1_second_n1 = 1 / (mole * second);
end
