// SBML level 3 version 1

model GeneticToggle()
  // Created by iBioSim flatten routine
  // model units - substance: mole, volume: litre

  // Compartments:
  compartment Cell = 1;

  // Species:
  substanceOnly species GFP in Cell = 0;
  substanceOnly species LacI in Cell = 60;
  substanceOnly species TetR in Cell = 0;
  substanceOnly species $IPTG in Cell = 0;
  substanceOnly species $aTc in Cell = 0;
  substanceOnly species IPTG_LacI in Cell = 0;
  substanceOnly species aTc_TetR in Cell = 0;
  substanceOnly species C1__pLac in Cell = 2;
  substanceOnly species C2__P0 in Cell = 2;
  substanceOnly species C1__pLac_RNAP in Cell = 0;
  substanceOnly species C1__pLac_LacI in Cell = 0;
  substanceOnly species C2__P0_RNAP in Cell = 0;
  substanceOnly species C2__P0_TetR in Cell = 0;
  substanceOnly species RNAP in Cell = 30;
  substanceOnly species Cell__RNAP in Cell = 30;

  // Parameters:
  kd = 0.0075; kd is "Degradation rate";
  kc_f = 0.05; kc_f is "Forward complex formation rate";
  kc_r = 1; kc_r is "Reverse complex formation rate";
  nc = 2; nc is "Stoichiometry of binding";
  C1__kr_f = 0.5; C1__kr_f is "Forward repression binding rate";
  C1__kr_r = 1; C1__kr_r is "Reverse repression binding rate";
  C1__ka_f = 0.0033; C1__ka_f is "Forward activation binding rate";
  C1__ka_r = 1; C1__ka_r is "Reverse activation binding rate";
  C1__ko_f = 0.033; C1__ko_f is "Forward RNAP binding rate";
  C1__ko_r = 1; C1__ko_r is "Reverse RNAP binding rate";
  C1__kao_f = 1; C1__kao_f is "Forward activated RNAP binding rate";
  C1__kao_r = 1; C1__kao_r is "Reverse activated RNAP binding rate";
  C1__nc = 2; C1__nc is "Stoichiometry of binding";
  C1__nr = 30; C1__nr is "Initial RNAP count";
  C1__ko = 0.05; C1__ko is "Open complex production rate";
  C1__kb = 0.0001; C1__kb is "Basal production rate";
  C1__ng = 2; C1__ng is "Initial promoter count";
  C1__np = 10; C1__np is "Stoichiometry of production";
  C1__ka = 0.25; C1__ka is "Activated production rate";
  C2__kr_f = 0.5; C2__kr_f is "Forward repression binding rate";
  C2__kr_r = 1; C2__kr_r is "Reverse repression binding rate";
  C2__ka_f = 0.0033; C2__ka_f is "Forward activation binding rate";
  C2__ka_r = 1; C2__ka_r is "Reverse activation binding rate";
  C2__ko_f = 0.033; C2__ko_f is "Forward RNAP binding rate";
  C2__ko_r = 1; C2__ko_r is "Reverse RNAP binding rate";
  C2__kao_f = 1; C2__kao_f is "Forward activated RNAP binding rate";
  C2__kao_r = 1; C2__kao_r is "Reverse activated RNAP binding rate";
  C2__nc = 2; C2__nc is "Stoichiometry of binding";
  C2__nr = 30; C2__nr is "Initial RNAP count";
  C2__ko = 0.05; C2__ko is "Open complex production rate";
  C2__kb = 0.0001; C2__kb is "Basal production rate";
  C2__ng = 2; C2__ng is "Initial promoter count";
  C2__np = 10; C2__np is "Stoichiometry of production";
  C2__ka = 0.25; C2__ka is "Activated production rate";

  // Reactions:
  Degradation_GFP: GFP => ; Degradation_GFP_kd*GFP;
    Degradation_GFP_kd = 0.0075 u_1_second_n1;
  Degradation_IPTG_LacI: IPTG_LacI => ; Degradation_IPTG_LacI_kd*IPTG_LacI;
    Degradation_IPTG_LacI_kd = 0.0075 u_1_second_n1;
  Degradation_LacI: LacI => ; Degradation_LacI_kd*LacI;
    Degradation_LacI_kd = 0.0075 u_1_second_n1;
  Degradation_aTc_TetR: aTc_TetR => ; Degradation_aTc_TetR_kd*aTc_TetR;
    Degradation_aTc_TetR_kd = 0.0075 u_1_second_n1;
  Degradation_TetR: TetR => ; Degradation_TetR_kd*TetR;
    Degradation_TetR_kd = 0.0075 u_1_second_n1;
  R_constitutive_production_C1__pLac: => 10 GFP + 10 TetR; R_constitutive_production_C1__pLac_ko*C1__pLac_RNAP;  // modifiers: C1__pLac_RNAP
    R_constitutive_production_C1__pLac_ko = 0.05 u_1_second_n1;
  R_constitutive_production_C2__P0: => 10 LacI; R_constitutive_production_C2__P0_ko*C2__P0_RNAP;  // modifiers: C2__P0_RNAP
    R_constitutive_production_C2__P0_ko = 0.05 u_1_second_n1;
  R_C1__pLac_RNAP: RNAP + C1__pLac -> C1__pLac_RNAP; R_C1__pLac_RNAP_ko_f*RNAP*C1__pLac - R_C1__pLac_RNAP_ko_r*C1__pLac_RNAP;
    R_C1__pLac_RNAP_ko_f = 0.033 u_1_mole_n1_1_second_n1; R_C1__pLac_RNAP_ko_r = 1 u_1_second_n1;
  R_repression_binding_C1__pLac_LacI: C1__pLac + 2 LacI -> C1__pLac_LacI; R_repression_binding_C1__pLac_LacI_kr_f*R_repression_binding_C1__pLac_LacI_Kr^(R_repression_binding_C1__pLac_LacI_nc - 1)*LacI^R_repression_binding_C1__pLac_LacI_nc*C1__pLac - R_repression_binding_C1__pLac_LacI_kr_r*C1__pLac_LacI;
    R_repression_binding_C1__pLac_LacI_kr_f = 0.5 u_1_mole_n1_1_second_n1; R_repression_binding_C1__pLac_LacI_kr_r = 1 u_1_second_n1; R_repression_binding_C1__pLac_LacI_Kr = 0.5 u_1_mole_n1; R_repression_binding_C1__pLac_LacI_nc = 2 dimensionless;
  R_C2__P0_RNAP: RNAP + C2__P0 -> C2__P0_RNAP; R_C2__P0_RNAP_ko_f*RNAP*C2__P0 - R_C2__P0_RNAP_ko_r*C2__P0_RNAP;
    R_C2__P0_RNAP_ko_f = 0.033 u_1_mole_n1_1_second_n1; R_C2__P0_RNAP_ko_r = 1 u_1_second_n1;
  R_repression_binding_C2__P0_TetR: C2__P0 + 2 TetR -> C2__P0_TetR; R_repression_binding_C2__P0_TetR_kr_f*R_repression_binding_C2__P0_TetR_Kr^(R_repression_binding_C2__P0_TetR_nc - 1)*TetR^R_repression_binding_C2__P0_TetR_nc*C2__P0 - R_repression_binding_C2__P0_TetR_kr_r*C2__P0_TetR;
    R_repression_binding_C2__P0_TetR_kr_f = 0.5 u_1_mole_n1_1_second_n1; R_repression_binding_C2__P0_TetR_kr_r = 1 u_1_second_n1; R_repression_binding_C2__P0_TetR_Kr = 0.5 u_1_mole_n1; R_repression_binding_C2__P0_TetR_nc = 2 dimensionless;
  Complex_IPTG_LacI: $IPTG + LacI -> IPTG_LacI; Complex_IPTG_LacI_kf_c*IPTG^nc__IPTG_IPTG_LacI*LacI^nc__LacI_IPTG_LacI - Complex_IPTG_LacI_kr_c*IPTG_LacI;
    nc__IPTG_IPTG_LacI = 1 dimensionless; nc__LacI_IPTG_LacI = 1 dimensionless; Complex_IPTG_LacI_kf_c = 0.05 u_1_mole_n1_1_second_n1; Complex_IPTG_LacI_kr_c = 1 u_1_second_n1;
  Complex_aTc_TetR: TetR + $aTc -> aTc_TetR; Complex_aTc_TetR_kf_c*TetR^nc__TetR_aTc_TetR*aTc^nc__aTc_aTc_TetR - Complex_aTc_TetR_kr_c*aTc_TetR;
    nc__TetR_aTc_TetR = 1 dimensionless; nc__aTc_aTc_TetR = 1 dimensionless; Complex_aTc_TetR_kf_c = 0.05 u_1_mole_n1_1_second_n1; Complex_aTc_TetR_kr_c = 1 u_1_second_n1;

  // Events:
  IPTG_High: at (2000) after (true), t0=false, persistent=false, fromTrigger=false: IPTG = 60;
  IPTG_Low: at (4000) after (true), t0=false, persistent=false, fromTrigger=false: IPTG = 0;
  aTc_High: at (6000) after (true), t0=false, persistent=false, fromTrigger=false: aTc = 60;
  aTc_Low: at (8000) after (true), t0=false, persistent=false, fromTrigger=false: aTc = 0;

  // Unit definitions:
  unit u_1_second_n1 = 1 / second;
  unit u_1_mole_n1_1_second_n1 = 1 / (mole * second);
  unit u_1_mole_n1 = 1 / mole;
end
