// SBML level 3 version 1

function get2DArrayElement(a, b, c)
  a;
end

function C1__total(x, y)
  x + 2*y;
end
C1__total is "Find total molecules";

function C1__uniform(a, b)
  (a + b)/2;
end
C1__uniform is "Uniform distribution";

function C2__total(x, y)
  x + 2*y;
end
C2__total is "Find total molecules";

function C2__uniform(a, b)
  (a + b)/2;
end
C2__uniform is "Uniform distribution";

model Population()
  // Created by libsbml flatten routine
  // model units - substance: mole, volume: litre

  // Compartments:
  compartment Grid = 1;
  compartment C1__Cell = 1;
  compartment C2__Cell = 1;

  // Species:
  substanceOnly species C1__CI in C1__Cell = 10;
  substanceOnly species C1__CI2 in C1__Cell = C1__CI;
  substanceOnly species C1__PR in C1__Cell = 2;
  substanceOnly species C1__CII in C1__Cell = 0;
  substanceOnly species C1__PRE in C1__Cell = 2;
  substanceOnly species C2__CI in C2__Cell = 10;
  substanceOnly species C2__CI2 in C2__Cell = C2__CI;
  substanceOnly species C2__PR in C2__Cell = 2;
  substanceOnly species C2__CII in C2__Cell = 0;
  substanceOnly species C2__PRE in C2__Cell = 2;
  substanceOnly species C2__PRE_RNAP in C2__Cell = 0;
  substanceOnly species C2__PRE_CII_RNAP in C2__Cell = 0;
  substanceOnly species C1__PRE_RNAP in C1__Cell = 0;
  substanceOnly species C1__PRE_CII_RNAP in C1__Cell = 0;
  substanceOnly species C1__PR_RNAP in C1__Cell = 0;
  substanceOnly species C1__PR_CI2_bound in C1__Cell = 0;
  substanceOnly species C2__PR_RNAP in C2__Cell = 0;
  substanceOnly species C2__PR_CI2_bound in C2__Cell = 0;
  substanceOnly species RNAP in Grid = 30;
  substanceOnly species Grid__RNAP in Grid = 30;
  substanceOnly species C1__Cell__RNAP in C1__Cell = 30;
  substanceOnly species C2__Cell__RNAP in C2__Cell = 30;
  substanceOnly species ROW0_COL0__CII in Grid = 0;
  substanceOnly species ROW0_COL1__CII in Grid = 0;

  // Parameters:
  kr_f = 0.5; kr_f is "Forward repression binding rate";
  kr_r = 1; kr_r is "Reverse repression binding rate";
  ka_f = 0.0033; ka_f is "Forward activation binding rate";
  ka_r = 1; ka_r is "Reverse activation binding rate";
  ko_f = 0.033; ko_f is "Forward RNAP binding rate";
  ko_r = 1; ko_r is "Reverse RNAP binding rate";
  kao_f = 1; kao_f is "Forward activated RNAP binding rate";
  kao_r = 1; kao_r is "Reverse activated RNAP binding rate";
  kc_f = 0.05; kc_f is "Forward complex formation rate";
  kc_r = 1; kc_r is "Reverse complex formation rate";
  kmdiff_f = 1; kmdiff_f is "Forward membrane diffusion rate";
  kmdiff_r = 0.01; kmdiff_r is "Reverse membrane diffusion rate";
  kd = 0.0075; kd is "Degradation rate";
  kecd = 0.005; kecd is "Extracellular degradation rate";
  nc = 2; nc is "Stoichiometry of binding";
  nr = 30; nr is "Initial RNAP count";
  ko = 0.05; ko is "Open complex production rate";
  kb = 0.0001; kb is "Basal production rate";
  ng = 2; ng is "Initial promoter count";
  np = 10; np is "Stoichiometry of production";
  ka = 0.25; ka is "Activated production rate";
  kecdiff = 1; kecdiff is "Extracellular diffusion rate";
  C1__kd = 0.0075; C1__kd is "Degradation rate";
  C1__kc_f = 0.05; C1__kc_f is "Forward complex formation rate";
  C1__kc_r = 1; C1__kc_r is "Reverse complex formation rate";
  C1__nc = 2; C1__nc is "Stoichiometry of binding";
  C1__kr_f = 0.5; C1__kr_f is "Forward repression binding rate";
  C1__kr_r = 1; C1__kr_r is "Reverse repression binding rate";
  C1__ka_f = 0.0033; C1__ka_f is "Forward activation binding rate";
  C1__ka_r = 1; C1__ka_r is "Reverse activation binding rate";
  C1__ko_f = 0.033; C1__ko_f is "Forward RNAP binding rate";
  C1__ko_r = 1; C1__ko_r is "Reverse RNAP binding rate";
  C1__kao_f = 1; C1__kao_f is "Forward activated RNAP binding rate";
  C1__kao_r = 1; C1__kao_r is "Reverse activated RNAP binding rate";
  C1__nr = 30; C1__nr is "Initial RNAP count";
  C1__ko = 0.05; C1__ko is "Open complex production rate";
  C1__kb = 0.0001; C1__kb is "Basal production rate";
  C1__ng = 2; C1__ng is "Initial promoter count";
  C1__np = 10; C1__np is "Stoichiometry of production";
  C1__ka = 0.25; C1__ka is "Activated production rate";
  C1__CI_total has C1__nanoMole;
  C1__kmdiff_f = 1; C1__kmdiff_f is "Forward membrane diffusion rate";
  C1__kmdiff_r = 0.01; C1__kmdiff_r is "Reverse membrane diffusion rate";
  C1__kecd = 0.005; C1__kecd is "Extracellular degradation rate";
  C1__kecdiff = 1; C1__kecdiff is "Extracellular diffusion rate";
  C2__kd = 0.0075; C2__kd is "Degradation rate";
  C2__kc_f = 0.05; C2__kc_f is "Forward complex formation rate";
  C2__kc_r = 1; C2__kc_r is "Reverse complex formation rate";
  C2__nc = 2; C2__nc is "Stoichiometry of binding";
  C2__kr_f = 0.5; C2__kr_f is "Forward repression binding rate";
  C2__kr_r = 1; C2__kr_r is "Reverse repression binding rate";
  C2__ka_f = 0.0033; C2__ka_f is "Forward activation binding rate";
  C2__ka_r = 1; C2__ka_r is "Reverse activation binding rate";
  C2__ko_f = 0.033; C2__ko_f is "Forward RNAP binding rate";
  C2__ko_r = 1; C2__ko_r is "Reverse RNAP binding rate";
  C2__kao_f = 1; C2__kao_f is "Forward activated RNAP binding rate";
  C2__kao_r = 1; C2__kao_r is "Reverse activated RNAP binding rate";
  C2__nr = 30; C2__nr is "Initial RNAP count";
  C2__ko = 0.05; C2__ko is "Open complex production rate";
  C2__kb = 0.0001; C2__kb is "Basal production rate";
  C2__ng = 2; C2__ng is "Initial promoter count";
  C2__np = 10; C2__np is "Stoichiometry of production";
  C2__ka = 0.25; C2__ka is "Activated production rate";
  C2__CI_total has C2__nanoMole;
  C2__kmdiff_f = 1; C2__kmdiff_f is "Forward membrane diffusion rate";
  C2__kmdiff_r = 0.01; C2__kmdiff_r is "Reverse membrane diffusion rate";
  C2__kecd = 0.005; C2__kecd is "Extracellular degradation rate";
  C2__kecdiff = 1; C2__kecdiff is "Extracellular diffusion rate";
  C1__CII__kmdiff_r = 0.01; C1__CII__kmdiff_r is "Reverse membrane diffusion rate";
  C1__CII__kmdiff_f = 1; C1__CII__kmdiff_f is "Forward membrane diffusion rate";
  C2__CII__kmdiff_r = 0.01; C2__CII__kmdiff_r is "Reverse membrane diffusion rate";
  C2__CII__kmdiff_f = 1; C2__CII__kmdiff_f is "Forward membrane diffusion rate";

  // Assignment rules:
  C1__CI_total := C1__total(C1__CI, C1__CI2);
  C2__CI_total := C2__total(C2__CI, C2__CI2);

  // Reactions:
  Degradation_C1__CI2: C1__CI2 => ; Degradation_C1__CI2_kd*C1__CI2;
    Degradation_C1__CI2_kd = 0.0075 u_1_second_n1;
  Degradation_C2__CI: C2__CI => ; Degradation_C2__CI_kd*C2__CI;
    Degradation_C2__CI_kd = 0.0075 u_1_second_n1;
  Degradation_C1__CI: C1__CI => ; Degradation_C1__CI_kd*C1__CI;
    Degradation_C1__CI_kd = 0.0075 u_1_second_n1;
  Degradation_C2__CI2: C2__CI2 => ; Degradation_C2__CI2_kd*C2__CI2;
    Degradation_C2__CI2_kd = 0.0075 u_1_second_n1;
  R_basal_production_C2__PRE: => 10 C2__CI; R_basal_production_C2__PRE_kb*C2__PRE_RNAP;  // modifiers: C2__PRE_RNAP
    R_basal_production_C2__PRE_kb = 4e-5 u_1_second_n1;
  R_act_production_C2__PRE_CII: => 10 C2__CI; R_act_production_C2__PRE_CII_ka*C2__PRE_CII_RNAP;  // modifiers: C2__PRE_CII_RNAP
    R_act_production_C2__PRE_CII_ka = 0.015 u_1_second_n1;
  R_basal_production_C1__PRE: => 10 C1__CI; R_basal_production_C1__PRE_kb*C1__PRE_RNAP;  // modifiers: C1__PRE_RNAP
    R_basal_production_C1__PRE_kb = 4e-5 u_1_second_n1;
  R_act_production_C1__PRE_CII: => 10 C1__CI; R_act_production_C1__PRE_CII_ka*C1__PRE_CII_RNAP;  // modifiers: C1__PRE_CII_RNAP
    R_act_production_C1__PRE_CII_ka = 0.015 u_1_second_n1;
  R_constitutive_production_C1__PR: => 5 C1__CII; R_constitutive_production_C1__PR_ko*C1__PR_RNAP;  // modifiers: C1__PR_RNAP
    R_constitutive_production_C1__PR_ko = 0.014 u_1_second_n1;
  R_constitutive_production_C2__PR: => 5 C2__CII; R_constitutive_production_C2__PR_ko*C2__PR_RNAP;  // modifiers: C2__PR_RNAP
    R_constitutive_production_C2__PR_ko = 0.014 u_1_second_n1;
  R_C2__PRE_RNAP: C2__Cell__RNAP + C2__PRE -> C2__PRE_RNAP; R_C2__PRE_RNAP_ko_f*C2__Cell__RNAP*C2__PRE - R_C2__PRE_RNAP_ko_r*C2__PRE_RNAP;
    R_C2__PRE_RNAP_ko_f = 0.01 u_1_mole_n1_1_second_n1; R_C2__PRE_RNAP_ko_r = 1 u_1_second_n1;
  R_RNAP_binding_C2__PRE_CII: C2__Cell__RNAP + C2__PRE + 2 C2__CII -> C2__PRE_CII_RNAP; R_RNAP_binding_C2__PRE_CII_kao_f*(R_RNAP_binding_C2__PRE_CII_Ka*C2__CII)^R_RNAP_binding_C2__PRE_CII_nc*C2__Cell__RNAP*C2__PRE - R_RNAP_binding_C2__PRE_CII_kao_r*C2__PRE_CII_RNAP;
    R_RNAP_binding_C2__PRE_CII_kao_f = 1 u_1_mole_n1_1_second_n1; R_RNAP_binding_C2__PRE_CII_kao_r = 1 u_1_second_n1; R_RNAP_binding_C2__PRE_CII_Ka = 0.0033 u_1_mole_n1; R_RNAP_binding_C2__PRE_CII_nc = 2 dimensionless;
  R_C1__PRE_RNAP: C1__Cell__RNAP + C1__PRE -> C1__PRE_RNAP; R_C1__PRE_RNAP_ko_f*C1__Cell__RNAP*C1__PRE - R_C1__PRE_RNAP_ko_r*C1__PRE_RNAP;
    R_C1__PRE_RNAP_ko_f = 0.01 u_1_mole_n1_1_second_n1; R_C1__PRE_RNAP_ko_r = 1 u_1_second_n1;
  R_RNAP_binding_C1__PRE_CII: C1__Cell__RNAP + C1__PRE + 2 C1__CII -> C1__PRE_CII_RNAP; R_RNAP_binding_C1__PRE_CII_kao_f*(R_RNAP_binding_C1__PRE_CII_Ka*C1__CII)^R_RNAP_binding_C1__PRE_CII_nc*C1__Cell__RNAP*C1__PRE - R_RNAP_binding_C1__PRE_CII_kao_r*C1__PRE_CII_RNAP;
    R_RNAP_binding_C1__PRE_CII_kao_f = 1 u_1_mole_n1_1_second_n1; R_RNAP_binding_C1__PRE_CII_kao_r = 1 u_1_second_n1; R_RNAP_binding_C1__PRE_CII_Ka = 0.0033 u_1_mole_n1; R_RNAP_binding_C1__PRE_CII_nc = 2 dimensionless;
  R_C1__PR_RNAP: C1__Cell__RNAP + C1__PR -> C1__PR_RNAP; R_C1__PR_RNAP_ko_f*C1__Cell__RNAP*C1__PR - R_C1__PR_RNAP_ko_r*C1__PR_RNAP;
    R_C1__PR_RNAP_ko_f = 0.69422 u_1_mole_n1_1_second_n1; R_C1__PR_RNAP_ko_r = 1 u_1_second_n1;
  R_repression_binding_C1__PR_CI2: C1__PR + 2 C1__CI2 -> C1__PR_CI2_bound; R_repression_binding_C1__PR_CI2_kr_f*R_repression_binding_C1__PR_CI2_Kr^(R_repression_binding_C1__PR_CI2_nc - 1)*C1__CI2^R_repression_binding_C1__PR_CI2_nc*C1__PR - R_repression_binding_C1__PR_CI2_kr_r*C1__PR_CI2_bound;
    R_repression_binding_C1__PR_CI2_kr_f = 0.5 u_1_mole_n1_1_second_n1; R_repression_binding_C1__PR_CI2_kr_r = 1 u_1_second_n1; R_repression_binding_C1__PR_CI2_Kr = 0.5 u_1_mole_n1; R_repression_binding_C1__PR_CI2_nc = 2 dimensionless;
  R_C2__PR_RNAP: C2__Cell__RNAP + C2__PR -> C2__PR_RNAP; R_C2__PR_RNAP_ko_f*C2__Cell__RNAP*C2__PR - R_C2__PR_RNAP_ko_r*C2__PR_RNAP;
    R_C2__PR_RNAP_ko_f = 0.69422 u_1_mole_n1_1_second_n1; R_C2__PR_RNAP_ko_r = 1 u_1_second_n1;
  R_repression_binding_C2__PR_CI2: C2__PR + 2 C2__CI2 -> C2__PR_CI2_bound; R_repression_binding_C2__PR_CI2_kr_f*R_repression_binding_C2__PR_CI2_Kr^(R_repression_binding_C2__PR_CI2_nc - 1)*C2__CI2^R_repression_binding_C2__PR_CI2_nc*C2__PR - R_repression_binding_C2__PR_CI2_kr_r*C2__PR_CI2_bound;
    R_repression_binding_C2__PR_CI2_kr_f = 0.5 u_1_mole_n1_1_second_n1; R_repression_binding_C2__PR_CI2_kr_r = 1 u_1_second_n1; R_repression_binding_C2__PR_CI2_Kr = 0.5 u_1_mole_n1; R_repression_binding_C2__PR_CI2_nc = 2 dimensionless;
  Complex_formation_C1__CI2: 3 C1__CI -> C1__CI2; Complex_formation_C1__CI2_kf_c*Complex_formation_C1__CI2_Kc^(nc__C1__CI_C1__CI2 - 2)*C1__CI^nc__C1__CI_C1__CI2 - Complex_formation_C1__CI2_kr_c*C1__CI2;
    nc__C1__CI_C1__CI2 = 3 dimensionless; Complex_formation_C1__CI2_kf_c = 0.15 u_1_mole_n1_1_second_n1; Complex_formation_C1__CI2_Kc = 0.15 u_1_mole_n1; Complex_formation_C1__CI2_kr_c = 1 u_1_second_n1;
  Complex_formation_C2__CI2: 3 C2__CI -> C2__CI2; Complex_formation_C2__CI2_kf_c*Complex_formation_C2__CI2_Kc^(nc__C2__CI_C2__CI2 - 2)*C2__CI^nc__C2__CI_C2__CI2 - Complex_formation_C2__CI2_kr_c*C2__CI2;
    nc__C2__CI_C2__CI2 = 3 dimensionless; Complex_formation_C2__CI2_kf_c = 0.15 u_1_mole_n1_1_second_n1; Complex_formation_C2__CI2_Kc = 0.15 u_1_mole_n1; Complex_formation_C2__CI2_kr_c = 1 u_1_second_n1;
  ROW0_COL0_Degradation_CII: ROW0_COL0__CII => ; ROW0_COL0_Degradation_CII_kecd*ROW0_COL0__CII;
    ROW0_COL0_Degradation_CII_kecd = 0.005 u_1_second_n1;
  ROW0_COL1_Degradation_CII: ROW0_COL1__CII => ; ROW0_COL1_Degradation_CII_kecd*ROW0_COL1__CII;
    ROW0_COL1_Degradation_CII_kecd = 0.005 u_1_second_n1;
  ROW0_COL1_Diffusion_CII_Left: ROW0_COL1__CII => ROW0_COL0__CII; ROW0_COL1_Diffusion_CII_Left_kecdiff*ROW0_COL1__CII;
    ROW0_COL1_Diffusion_CII_Left_kecdiff = 1 u_1_second_n1;
  ROW0_COL0_Diffusion_CII_Right: ROW0_COL0__CII => ROW0_COL1__CII; ROW0_COL0_Diffusion_CII_Right_kecdiff*ROW0_COL0__CII;
    ROW0_COL0_Diffusion_CII_Right_kecdiff = 1 u_1_second_n1;
  C1__MembraneDiffusion_CII: C1__CII -> ROW0_COL0__CII; C1__CII__kmdiff_f*C1__CII - C1__CII__kmdiff_r*ROW0_COL0__CII;
  C2__MembraneDiffusion_CII: C2__CII -> ROW0_COL1__CII; C2__CII__kmdiff_f*C2__CII - C2__CII__kmdiff_r*ROW0_COL1__CII;

  // Events:
  C1__SymmetricDivision__CellDivision: at (2100) after (true), t0=false, persistent=false, fromTrigger=false: C1__CI = C1__CI/C1__uniform(1, 2), C1__CI2 = C1__CI2/C1__uniform(1, 2), C1__CII = C1__CII/C1__uniform(1, 2);
  C2__SymmetricDivision__CellDivision: at (2100) after (true), t0=false, persistent=false, fromTrigger=false: C2__CI = C2__CI/C2__uniform(1, 2), C2__CI2 = C2__CI2/C2__uniform(1, 2), C2__CII = C2__CII/C2__uniform(1, 2);

  // Constraints:
  constraint C1__CI <= 20;
  constraint C1__CII <= 50;
  constraint C2__CI <= 20;
  constraint C2__CII <= 50;

  // Unit definitions:
  unit u_1_second_n1 = 1 / second;
  unit C1__nanoMole = 1e-9 mole;
  unit C1__microLitre = 1e-3 litre;
  unit C2__nanoMole = 1e-9 mole;
  unit C2__microLitre = 1e-3 litre;
  unit u_1_mole_n1_1_second_n1 = 1 / (mole * second);
  unit u_1_mole_n1 = 1 / mole;
end
