// SBML level 3 version 1

model TestDivide()
  // Created by iBioSim flatten routine
  // model units - substance: mole, volume: litre

  // Compartments:
  compartment Grid = 1;
  compartment C1__Cell = 1;

  // Species:
  substanceOnly species C1__S0 in C1__Cell = 0;

  // Parameters:
  kr_f = 0.5; kr_f is "Forward repression binding rate";
  kr_r = 1; kr_r is "Reverse repression binding rate";
  ka_f = 0.0033; ka_f is "Forward activation binding rate";
  ka_r = 1; ka_r is "Reverse activation binding rate";
  ko_f = 0.033; ko_f is "Forward RNAP binding rate";
  ko_r = 1; ko_r is "Reverse RNAP binding rate";
  kao_f = 1; kao_f is "Forward activated RNAP binding rate";
  kao_r = 1; kao_r is "Reverse activated RNAP binding rate";
  kc_f = 0.05; kc_f is "Forward complex formation rate";
  kc_r = 1; kc_r is "Reverse complex formation rate";
  kmdiff_f = 1; kmdiff_f is "Forward membrane diffusion rate";
  kmdiff_r = 0.01; kmdiff_r is "Reverse membrane diffusion rate";
  kd = 0.0075; kd is "Degradation rate";
  kecd = 0.005; kecd is "Extracellular degradation rate";
  nc = 2; nc is "Stoichiometry of binding";
  nr = 30; nr is "Initial RNAP count";
  ko = 0.05; ko is "Open complex production rate";
  kb = 0.0001; kb is "Basal production rate";
  ng = 2; ng is "Initial promoter count";
  np = 10; np is "Stoichiometry of production";
  ka = 0.25; ka is "Activated production rate";
  kecdiff = 1; kecdiff is "Extracellular diffusion rate";
  Divide__locations = 0;
  C1__kd = 0.0075; C1__kd is "Degradation rate";
  C1__np = 10; C1__np is "Stoichiometry of production";
  C1__ko = 0.05; C1__ko is "Open complex production rate";

  // Reactions:
  Constitutive_production_C1__S0: => 10 C1__S0; kp;
    kp = 0.05;
  Degradation_C1__S0: C1__S0 => ; Degradation_C1__S0_kd*C1__S0;
    Degradation_C1__S0_kd = 0.0075 u_1_second_n1;

  // Events:
  C1__SymmetricDivision__event0: at (200) after (true), t0=false, persistent=false, fromTrigger=false: ;
  C1__Death__event1: at (100) after (C1__S0 > 50), t0=false, persistent=false, fromTrigger=false: ;

  // Unit definitions:
  unit u_1_second_n1 = 1 / second;
end
