// SBML level 2 version 2

function F(t, x)
  !t || !x;
end
F is "Eventually Property";

model Majority(Cell, A, B, Degradation_C, C)

  // Compartments:
  compartment Cell = 1;

  // Species:
  substanceOnly species $A in Cell = 0;
  substanceOnly species X in Cell = 70;
  substanceOnly species Y in Cell = 70;
  substanceOnly species D in Cell = 70;
  substanceOnly species $B in Cell = 120;
  substanceOnly species Z in Cell = 0;
  substanceOnly species E in Cell = 0;
  substanceOnly species C in Cell = 70;
  substanceOnly species P8 in Cell = 2;
  substanceOnly species P1 in Cell = 2;
  substanceOnly species P2 in Cell = 2;
  substanceOnly species P3 in Cell = 2;
  substanceOnly species P4 in Cell = 2;
  substanceOnly species P5 in Cell = 2;
  substanceOnly species P6 in Cell = 2;
  substanceOnly species P7 in Cell = 2;

  // Parameters:
  kr_f = 0.5; kr_f is "Forward repression binding rate";
  kr_r = 1; kr_r is "Reverse repression binding rate";
  ka_f = 0.0033; ka_f is "Forward activation binding rate";
  ka_r = 1; ka_r is "Reverse activation binding rate";
  ko_f = 0.033; ko_f is "Forward RNAP binding rate";
  ko_r = 1; ko_r is "Reverse RNAP binding rate";
  kao_f = 1; kao_f is "Forward activated RNAP binding rate";
  kao_r = 1; kao_r is "Reverse activated RNAP binding rate";
  nc = 2; nc is "Stoichiometry of binding";
  nr = 30; nr is "Initial RNAP count";
  ko = 0.05; ko is "Open complex production rate";
  kb = 0.0001; kb is "Basal production rate";
  ng = 2; ng is "Initial promoter count";
  np = 10; np is "Stoichiometry of production";
  ka = 0.25; ka is "Activated production rate";
  kd = 0.00075; kd is "Degradation rate";

  // Reactions:
  Degradation_C: 10 C => ; kd*C;
  Degradation_D: 10 D => ; kd*D;
  Degradation_E: 10 E => ; kd*E;
  Degradation_X: 10 X => ; kd*X;
  Degradation_Y: 10 Y => ; kd*Y;
  Degradation_Z: 10 Z => ; kd*Z;
  Production_P1: => 10 X + 10 Y; P1*ko*ko_f/ko_r*nr/(1 + ko_f/ko_r*nr + (kr_f/kr_r*A)^nc);  // modifiers: P1, A
  Production_P2: => 10 Z + 10 X; P2*ko*ko_f/ko_r*nr/(1 + ko_f/ko_r*nr + (kr_f/kr_r*B)^nc);  // modifiers: P2, B
  Production_P3: => 10 Y + 10 Z; P3*ko*(ko_f/ko_r)*nr/(1 + ko_f/ko_r*nr + (kr_f/kr_r*D)^nc);  // modifiers: P3, D
  Production_P4: => 10 D; P4*ko*ko_f/ko_r*nr/(1 + ko_f/ko_r*nr + (kr_f/kr_r*X)^nc);  // modifiers: P4, X
  Production_P5: => 10 D; P5*ko*ko_f/ko_r*nr/(1 + ko_f/ko_r*nr + (kr_f/kr_r*Y)^nc);  // modifiers: P5, Y
  Production_P6: => 10 D; P6*ko*(ko_f/ko_r)*nr/(1 + ko_f/ko_r*nr + (kr_f/kr_r*Z)^nc);  // modifiers: P6, Z
  Production_P7: => 10 E; P7*ko*ko_f/ko_r*nr/(1 + ko_f/ko_r*nr + (kr_f/kr_r*D)^nc);  // modifiers: P7, D
  Production_P8: => 10 C; P8*ko*(ko_f/ko_r)*nr/(1 + ko_f/ko_r*nr + (kr_f/kr_r*E)^nc);  // modifiers: P8, E

  // Constraints:
  constraint F(time <= 2100, (E > 40) && (C < 20));
end
