// SBML level 3 version 2

model DSensor(Cell, S1, Degradation_S1, D)

  // Compartments:
  compartment Cell = 1;

  // Species:
  substanceOnly species $D in Cell = 60;
  substanceOnly species S1 in Cell = 0;
  substanceOnly species P0 in Cell = 2;

  // Parameters:
  kr_f = 0.5; kr_f is "Forward repression binding rate";
  kr_r = 1; kr_r is "Reverse repression binding rate";
  ka_f = 0.0033; ka_f is "Forward activation binding rate";
  ka_r = 1; ka_r is "Reverse activation binding rate";
  ko_f = 0.033; ko_f is "Forward RNAP binding rate";
  ko_r = 1; ko_r is "Reverse RNAP binding rate";
  kao_f = 1; kao_f is "Forward activated RNAP binding rate";
  kao_r = 1; kao_r is "Reverse activated RNAP binding rate";
  nc = 2; nc is "Stoichiometry of binding";
  nr = 30; nr is "Initial RNAP count";
  ko = 0.05; ko is "Open complex production rate";
  kb = 0.0001; kb is "Basal production rate";
  ng = 2; ng is "Initial promoter count";
  np = 10; np is "Stoichiometry of production";
  ka = 0.25; ka is "Activated production rate";
  kd = 0.0075; kd is "Degradation rate";

  // Reactions:
  Production_P0: => 10 S1; P0*(kb*ko_f/ko_r*nr + ka*kao_f/kao_r*nr*(ka_f/ka_r*D)^nc)/(1 + ko_f/ko_r*nr + kao_f/kao_r*nr*(ka_f/ka_r*D)^nc);  // modifiers: P0, D
  Degradation_S1: S1 => ; kd*S1;
end
