// SBML level 2 version 2

function F(t, x)
  !t || !x;
end
F is "Eventually Property";

model Speed_Independent(Cell, A, B, C, Degradation_C)

  // Compartments:
  compartment Cell = 1;

  // Species:
  substanceOnly species $A in Cell = 0;
  substanceOnly species S1 in Cell = 70;
  substanceOnly species S2 in Cell = 0;
  substanceOnly species S3 in Cell = 70;
  substanceOnly species S4 in Cell = 130;
  substanceOnly species $B in Cell = 120;
  substanceOnly species Y in Cell = 0;
  substanceOnly species Z in Cell = 0;
  substanceOnly species C in Cell = 70;
  substanceOnly species P10 in Cell = 2;
  substanceOnly species P1 in Cell = 2;
  substanceOnly species P2 in Cell = 2;
  substanceOnly species P3 in Cell = 2;
  substanceOnly species P4 in Cell = 2;
  substanceOnly species P5 in Cell = 2;
  substanceOnly species P6 in Cell = 2;
  substanceOnly species P7 in Cell = 2;
  substanceOnly species P8 in Cell = 2;
  substanceOnly species P9 in Cell = 2;
  substanceOnly species X in Cell = 70;

  // Parameters:
  kd = 0.00075; kd is "Degradation rate";
  kr_f = 0.5; kr_f is "Forward repression binding rate";
  kr_r = 1; kr_r is "Reverse repression binding rate";
  ka_f = 0.0033; ka_f is "Forward activation binding rate";
  ka_r = 1; ka_r is "Reverse activation binding rate";
  ko_f = 0.033; ko_f is "Forward RNAP binding rate";
  ko_r = 1; ko_r is "Reverse RNAP binding rate";
  kao_f = 1; kao_f is "Forward activated RNAP binding rate";
  kao_r = 1; kao_r is "Reverse activated RNAP binding rate";
  nc = 2; nc is "Stoichiometry of binding";
  nr = 30; nr is "Initial RNAP count";
  ko = 0.05; ko is "Open complex production rate";
  kb = 0.0001; kb is "Basal production rate";
  ng = 2; ng is "Initial promoter count";
  np = 10; np is "Stoichiometry of production";
  ka = 0.25; ka is "Activated production rate";

  // Reactions:
  Degradation_S4: 10 S4 => ; kd*S4;
  Degradation_S1: 10 S1 => ; kd*S1;
  Degradation_Z: 10 Z => ; kd*Z;
  Degradation_C: 10 C => ; kd*C;
  Production_P10: => 10 S4; P10*ko*(ko_f/ko_r)*nr/(1 + ko_f/ko_r*nr + (kr_f/kr_r*S2)^nc);  // modifiers: P10, S2
  Production_P1: => 10 S4 + 10 X; P1*ko*(ko_f/ko_r)*nr/(1 + ko_f/ko_r*nr + (kr_f/kr_r*A)^nc);  // modifiers: P1, A
  Production_P2: => 10 S4 + 10 Y; P2*ko*(ko_f/ko_r)*nr/(1 + ko_f/ko_r*nr + (kr_f/kr_r*B)^nc);  // modifiers: P2, B
  Production_P3: => 10 S3 + 10 Z; P3*ko*(ko_f/ko_r)*nr/(1 + ko_f/ko_r*nr + (kr_f/kr_r*S4)^nc);  // modifiers: P3, S4
  Production_P4: => 10 S1; P4*ko*(ko_f/ko_r)*nr/(1 + ko_f/ko_r*nr + (kr_f/kr_r*X)^nc);  // modifiers: P4, X
  Production_P5: => 10 S2; P5*ko*(ko_f/ko_r)*nr/(1 + ko_f/ko_r*nr + (kr_f/kr_r*S1)^nc);  // modifiers: P5, S1
  Production_P6: => 10 S3; P6*ko*(ko_f/ko_r)*nr/(1 + ko_f/ko_r*nr + (kr_f/kr_r*S2)^nc);  // modifiers: P6, S2
  Production_P7: => 10 S1; P7*ko*(ko_f/ko_r)*nr/(1 + ko_f/ko_r*nr + (kr_f/kr_r*Y)^nc);  // modifiers: P7, Y
  Production_P8: => 10 S2 + 10 Z; P8*ko*(ko_f/ko_r)*nr/(1 + ko_f/ko_r*nr + (kr_f/kr_r*S3)^nc);  // modifiers: P8, S3
  Production_P9: => 10 C; P9*ko*(ko_f/ko_r)*nr/(1 + ko_f/ko_r*nr + (kr_f/kr_r*Z)^nc);  // modifiers: P9, Z
  Degradation_X: 10 X => ; kd*X;
  Degradation_S2: 10 S2 => ; kd*S2;
  Degradation_S3: 10 S3 => ; kd*S3;
  Degradation_Y: 10 Y => ; kd*Y;

  // Constraints:
  constraint F(time <= 2100, (S2 > 80) && (S3 < 20));
end
